!input for complex fibrin problem, 0.1un/mL
!chung yuen brandon yeung, 31 oct 2016.
!title
/title, beam analysis using beam4 3d elastic beam element
!input type of elements.
/prep7  !invokes preprocessor
et,1,beam4  !keyopt(6)=0
!mat,1 !defines material number
!mp, lab, mat, c0, c1, c2, c3, c4
mp,ex,1,5e6  !modulus of elasticity of fibrin = range between 1 and 10 mpa. Pick midpoint 5MPa
mp,prxy,1,0.4999999 !poissons ratio of fibrin = range between 0.5 and 1.3. Start with close to 0.5
!section properties: ansys calls them real constants
!real constants for beam4 : area,izz,iyy,tkz,tky,theta,istrn,ixx,shearz,sheary,spin,addmas
!r, nset, r1, r2, r3, r4, r5, r6
r,1,1.0459e-12,8.705e-26,8.705e-26,5.77e-7,5.77e-7,0 ! 6 values on first line
rmore, 0,1.7411e-25,,,, ! rmore for additional values
!input node locations
!n, node, x, y, z, thxy, thyz, thzx

! BEGIN FIBRIL 1
n,1,-4.038e-6,4.038e-6,47.45e-6
n,2,-7.067e-6,6.058e-6,47.45e-6
n,3,-9.086e-6,12.115e-6,47.45e-6
n,4,-10.096e-6,13.125e-6,47.45e-6
n,5,-13.125e-6,20.19e-6,47.45e-6
! END FIBRIL 1
! BEGIN FIBRIL 2
n,6,-2.019e-6,8.077e-6,47.45e-6
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n,33,-12.115e-6,41.39e-6,40.38e-6
! END FIBRIL 14
! BEGIN FIBRIN 15
n,34,-2.019e-6,48.46e-6,40.38e-6
! END FIBRIN 15
! BEGIN FIBRIN 16
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n,49,-18.173e-6,13.125e-6,36.35e-6
! END FIBRIN 16
! BEGIN FIBRIL 17
n,50,-9.086e-6,0,46.44e-6
! END FIBRIL 17
! BEGIN FIBRIL 18
! END FIBRIL 18
! BEGIN FIBRIL 18
! END FIBRIL 18
! BEGIN FIBRIL 19
! END FIBRIL 19
! BEGIN FIBRIL 20
n,51,-14.134e-6,3.029e-6,29.28e-6
n,52,8.077e-6,0,28.27e-6
n,53,0,3.029e-6,27.26e-6
! END FIBRIL 20
! BEGIN FIBRIL 21
n,54,-48.46e-6,48.46e-6,45.43e-6
! END FIBIRL 21
! BEGIN FIBIRL 22
! END FIBRIL 22
! BEGIN FIBRIL 23
! END FIBRIL 23
! BEZGIN FIBRIL 24
! EZND FIBRIL 24
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n,63,-1.0096e-6,9.086e-6,23.22e-6
! END FIBRIL 27
! BEZGIN FIBRIL 28
n,64,0,14.134e-6,22.21e-6
n,65,0,21.20e-6,23.22e-6
! END FIBRILL 28
! BEGIN FIBILR 29
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
! fibrils complete


!element generation
type,1$ mat,1$ real,1   !input for element attributes(etyp,mat,real)
! element connection. No need specify third node since Theta already specified
! BEGIN FIBRIL 1
en,1,1,2
en,2,2,3
en,3,3,4
en,4,4,5
! END FIBRIL 1
! BEGIN FIBRIL 2
en,5,2,6
en,6,6,7
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! NEGIN FIBRIL 29
en,80,65,66
en,81,66,67
en,82,67,28
! END FIBIRL 29
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! BEGIN FIVRIL 38
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! END FIVBRIL 43
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! BEGIN FIBRIIL 53
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
! fibrils complete

! Note that in the ANSYS display window, the visual nodal displacements do not use the same scale as the lengths
! of the elements. My actual nodal displacements are very large because my load is very large, even though the
! deflections don't look large visually for that reason. Next step would be to apply fixed supports to one plane,
! then apply tensile load on the nodes of the opposite plane to find out the Young's modulus and Poisson's ratio
! of the aggregate clot sample (as opposed to individual ropes). Do this for each spatial direction X Y Z. Don't
! worry about Poisson's ratio greater than 0.5 because there is ample room between adjacent fibrils so the extra
! volume expansion of fibrils should not impact adjacent fibrils, and ANSYS linear material model (which is used
! here) does not allow for Poisson's ratios greater than 0.5. It is also unclear how the authors of the paper who
! measured these Poisson's ratios defined Poisson's ratio. Pending Carr's approval, this should be the remaining
! work of my E59 project.

!input load boundary conditions
!f, node, lab, value, value2, nend, ninc                                                 used for concentrated loads
!sfbeam, elem, lkey, lab, vali, valj, val2i, val2j, ioffst, joffst, lenrat               used for distributed loads
! if value j is left blank it will default to value i
f,54,fy,-5e-3 ! axial concentrated load at node 1; rotation exceeds ANSYS limit if load exceeds 5e-3
!sfbeam,2,1,pres,10e3
! input deformation boundary condition  (these are the 'things at the end')
! d, node, lab, value, value2, nend, ninc, lab2, lab3, lab4, lab5, lab6
d,1,all,0                 !roller at left support

!d,103,ux,0 $d,103,uy,0 $d,103,uz,0 !pinned at right support
d,103,all,0

finish
/solu
antype,static !select static load solution
solve
save
finish

/post1
